C_MS := 0.821 mm/N
S_d := 119 cm^2
V_as := 16.5 L = 0.0165 m^3
M_md := 13.955 gm
M_MS := 14.7 gm
Q_MS := 3.246
Q_es := 0.452
Q_ts := 0.397
R_E := 7.2 Ω
BL := 8.2 T*m
B := 1 T
l_e := BL/B = 8.2 m
Dia_coil := 36 mm
Omk_coil := Dia_coil*π = 0.113097 m
N := l_e/Omk_coil = 72.5039
L_e := N^2/l_e = 641.075 1/m
L_E := 1 mH = 0.001 H
# Det elektriske system (jvf Tore s. 34)
U_G := 1 V
R_G := 0.1 Ω
f_1 := R_E/(2*π*L_E) = 1145.92 1/s
# Det mekaniske system (s. 35)
f_s := 1/(2*π*sqrt(M_MS*C_MS)) = 45.8131 1/s
R_MS := 1/Q_MS*sqrt(M_MS/C_MS) = 1.30358 Ω*s^2*A^2/m^2
